# OpenSim document version 30000
Model Foetus_v4:
  length_units: meters
  force_units: N
  gravity: 0 -9.80665 0
  credits:
    Frank Anderson, Peter Loan, Ayman Habib, Ajay Seth, Michael Sherman
  BodySet:
    Body ground: mass=0 mass_center=(0 0 0) inertia_xx=1 inertia_yy=1 inertia_zz=1
    Body Pelvis: mass=0.2052388 mass_center=(0.00431696 0.22143 0.142271) inertia_xx=0.0001086085
        inertia_yy=0.0001563258 inertia_zz=0.0001265522 inertia_xy=1.79179e-6 inertia_xz=1.833725e-6
        inertia_yz=-5.660162e-6
        meshes=(Foetus_Geometries\R_coxal.vtp Foetus_Geometries\Sacrum.vtp Foetus_Geometries\L_coxal.vtp)
      CustomJoint Pelvis_Ground: parent_body=ground location_in_parent=(0 0 0) location=(0 0 0)
        Coordinate Pelvis_tilt: range=(-1.5708 1.5708) default_value=-1.5708
        Coordinate Pelvis_rotation: range=(-1.5708 1.5708) default_value=1.5708
        Coordinate Pelvis_flexion: range=(-1.5708 1.5708)
        Coordinate Pelvis_T_front: range=(-10 10)
        Coordinate Pelvis_T_up: range=(-10 10)
        Coordinate Pelvis_T_right: range=(-10 10)
        SpatialTransform:
          TransformAxis rotation1: coordinates=Pelvis_tilt axis=(1 0 0) LinearFunction(coefficients=1 0)
          TransformAxis rotation2: coordinates=Pelvis_rotation axis=(0 1 0) LinearFunction(coefficients=1 0)
          TransformAxis rotation3: coordinates=Pelvis_flexion axis=(0 0 1) LinearFunction(coefficients=1 0)
          TransformAxis translation1: coordinates=Pelvis_T_front axis=(1 0 0) LinearFunction(coefficients=1 0)
          TransformAxis translation2: coordinates=Pelvis_T_up axis=(0 1 0) LinearFunction(coefficients=1 0)
          TransformAxis translation3: coordinates=Pelvis_T_right axis=(0 0 1) LinearFunction(coefficients=1 0)
    Body Lumbar: mass=0.3263437 mass_center=(-0.00153209 0.212099 0.193809) inertia_xx=0.0001746036
        inertia_yy=0.0003019833 inertia_zz=0.0003243287 inertia_xy=2.387442e-6 inertia_xz=1.034007e-5
        inertia_yz=-7.227318e-6 meshes=Foetus_Geometries\Lumbar.vtp
      CustomJoint Lumbo-Sacral: parent_body=Pelvis location_in_parent=(-0.01273601 0.01275299 0.0002536164)
          orientation_in_parent=(-0.03483035 0.08476452 0.1612318) location=(-0.01273601 0.01275299 0.0002536164)
          orientation=(-0.09148828 -0.004182789 0.126295)
        Coordinate Lumbar_lateral_tilt: range=(-0.7854 0.7854)
        Coordinate Lumbar_rotation: range=(-0.2618 0.2618)
        Coordinate Lumbar_flexion_extension: range=(-1.309 0.5236) default_value=-1.309
        SpatialTransform: axes_held_at_zero=translation1
          TransformAxis rotation1: coordinates=Lumbar_lateral_tilt axis=(1 0 0) LinearFunction(coefficients=1 0)
          TransformAxis rotation2: coordinates=Lumbar_rotation axis=(0 1 0) LinearFunction(coefficients=1 0)
          TransformAxis rotation3: coordinates=Lumbar_flexion_extension axis=(0 0 1) LinearFunction(coefficients=1 0)
          TransformAxis translation2: axis=(0 1 0)
            constant: value=0
          TransformAxis translation3: axis=(0 0 1)
            constant: value=0
    Body Thorax: mass=0.5701869 mass_center=(-0.00719017 0.212581 0.261153) inertia_xx=0.0006156375
        inertia_yy=0.0007221842 inertia_zz=0.0004932887 inertia_xy=-4.87938e-6 inertia_xz=-6.520744e-6
        inertia_yz=6.353841e-5 meshes=Foetus_Geometries\Thorax.vtp
      CustomJoint ThoraxToLumbar: parent_body=Lumbar location_in_parent=(-0.01793802 0.06083466 -0.003847875)
          orientation_in_parent=(-0.09044281 -0.004050044 0.1262993) location=(-0.01793802 0.06083466 -0.003847875)
          orientation=(-0.07102833 -0.01269922 0.005673096)
        Coordinate Thorax_tilt: range=(-0.7854 0.7854)
        Coordinate Thorax_rotation: range=(-0.2618 0.2618)
        Coordinate Thorax_flexion_extension: range=(-1.309 0.5236) default_value=-0.3490659
        SpatialTransform:
          TransformAxis rotation1: coordinates=Thorax_tilt axis=(1 0 0) LinearFunction(coefficients=1 0)
          TransformAxis rotation2: coordinates=Thorax_rotation axis=(0 1 0) LinearFunction(coefficients=1 0)
          TransformAxis rotation3: coordinates=Thorax_flexion_extension axis=(0 0 1) LinearFunction(coefficients=1 0)
          TransformAxis translation1: axis=(1 0 0)
            constant: value=0
          TransformAxis translation2: axis=(0 1 0)
            constant: value=0
          TransformAxis translation3: axis=(0 0 1)
            constant: value=0
    Body C7: mass=0.001229272 mass_center=(-0.00961277 0.219617 0.307491) inertia_xx=3.238823e-8 inertia_yy=5.288725e-8
        inertia_zz=7.628313e-8 inertia_xy=1.376289e-9 inertia_xz=2.250574e-10 inertia_yz=1.076619e-9
        meshes=Foetus_Geometries\C7.vtp
      CustomJoint C7-Thorax: parent_body=Thorax location_in_parent=(-0.01799806 0.14952 -0.01042268)
          orientation_in_parent=(-0.07102875 -0.0126242 0.006666393) location=(-0.01799806 0.14952 -0.01042268)
          orientation=(-0.1284126 0.006944933 -0.2408612)
        Coordinate C7_tilt: range=(-0.7854 0.7854)
        Coordinate C7_rotation: range=(-0.7854 0.7854)
        Coordinate C7_flexion_extension: range=(-0.7854 0.7854) default_value=-0.087266
        SpatialTransform:
          TransformAxis rotation1: coordinates=C7_tilt axis=(1 0 0) LinearFunction(coefficients=1 0)
          TransformAxis rotation2: coordinates=C7_rotation axis=(0 1 0) LinearFunction(coefficients=1 0)
          TransformAxis rotation3: coordinates=C7_flexion_extension axis=(0 0 1) LinearFunction(coefficients=1 0)
          TransformAxis translation1: axis=(1 0 0)
            constant: value=0
          TransformAxis translation2: axis=(0 1 0)
            constant: value=0
          TransformAxis translation3: axis=(0 0 1)
            constant: value=0
    Body C6: mass=0.001101692 mass_center=(-0.0094338 0.218516 0.31305) inertia_xx=2.596385e-8 inertia_yy=4.458411e-8
        inertia_zz=6.414905e-8 inertia_xy=1.805596e-9 inertia_xz=-1.196878e-9 inertia_yz=4.387437e-11
        meshes=Foetus_Geometries\C6.vtp
      CustomJoint C6-C7: parent_body=C7 location_in_parent=(-0.01715001 0.1553842 -0.01118516)
          orientation_in_parent=(-0.1284126 0.006944933 -0.2408612) location=(-0.01715001 0.1553842 -0.01118516)
          orientation=(-0.09575254 0.02719471 -0.1266748)
        Coordinate C6_To_C7_tilt: range=(-0.2618 0.2618)
        Coordinate C6_To_C7_rotation: range=(-0.2618 0.2618)
        Coordinate C6_To_C7_flexion_extension: range=(-0.2618 0.2618) default_value=-0.087266
        SpatialTransform:
          TransformAxis rotation1: coordinates=C6_To_C7_tilt axis=(1 0 0) LinearFunction(coefficients=1 0)
          TransformAxis rotation2: coordinates=C6_To_C7_rotation axis=(0 1 0) LinearFunction(coefficients=1 0)
          TransformAxis rotation3: coordinates=C6_To_C7_flexion_extension axis=(0 0 1) LinearFunction(coefficients=1 0)
          TransformAxis translation1: axis=(1 0 0)
            constant: value=0
          TransformAxis translation2: axis=(0 1 0)
            constant: value=0
          TransformAxis translation3: axis=(0 0 1)
            constant: value=0
    Body C5: mass=0.001112022 mass_center=(-0.0092041 0.218358 0.318242) inertia_xx=2.634777e-8 inertia_yy=4.449845e-8
        inertia_zz=6.515665e-8 inertia_xy=1.709882e-9 inertia_xz=-2.956106e-9 inertia_yz=-1.926417e-9
        meshes=Foetus_Geometries\C5.vtp
      CustomJoint C5-C6: parent_body=C6 location_in_parent=(-0.01795967 0.1614319 -0.01191873)
          orientation_in_parent=(-0.09565144 0.02712695 -0.1276511) location=(-0.01795967 0.1614319 -0.01191873)
          orientation=(-0.2433551 0.06104987 -0.1237823)
        Coordinate C5_To_C6_tilt: range=(-0.2618 0.2618)
        Coordinate C5_To_C6_rotation: range=(-0.2618 0.2618)
        Coordinate C5_To_C6_flexion_extension: range=(-0.2618 0.2618) default_value=-0.087266
        SpatialTransform:
          TransformAxis rotation1: coordinates=C5_To_C6_tilt axis=(1 0 0) LinearFunction(coefficients=1 0)
          TransformAxis rotation2: coordinates=C5_To_C6_rotation axis=(0 1 0) LinearFunction(coefficients=1 0)
          TransformAxis rotation3: coordinates=C5_To_C6_flexion_extension axis=(0 0 1) LinearFunction(coefficients=1 0)
          TransformAxis translation1: axis=(1 0 0)
            constant: value=0
          TransformAxis translation2: axis=(0 1 0)
            constant: value=0
          TransformAxis translation3: axis=(0 0 1)
            constant: value=(1 0)
    Body C4: mass=0.0009901696 mass_center=(-0.0086479 0.217663 0.323604) inertia_xx=2.150948e-8 inertia_yy=3.831526e-8
        inertia_zz=5.54084e-8 inertia_xy=2.198423e-9 inertia_xz=-3.585659e-9 inertia_yz=-1.395939e-9
        meshes=Foetus_Geometries\C4.vtp
      CustomJoint C4-C5: parent_body=C5 location_in_parent=(-0.01829365 0.1670168 -0.01314792)
          orientation_in_parent=(-0.2433215 0.0598683 -0.1219527) location=(-0.01829365 0.1670168 -0.01314792)
          orientation=(-0.4144393 0.07102308 0.109989)
        Coordinate C4_To_C5_tilt: range=(-0.2618 0.2618)
        Coordinate C4_To_C5_rotation: range=(-0.2618 0.2618)
        Coordinate C4_To_C5_flexion_extension: range=(-0.2618 0.2618) default_value=-0.087266
        SpatialTransform:
          TransformAxis rotation1: coordinates=C4_To_C5_tilt axis=(1 0 0) LinearFunction(coefficients=1 0)
          TransformAxis rotation2: coordinates=C4_To_C5_rotation axis=(0 1 0) LinearFunction(coefficients=1 0)
          TransformAxis rotation3: coordinates=C4_To_C5_flexion_extension axis=(0 0 1) LinearFunction(coefficients=1 0)
          TransformAxis translation1: axis=(1 0 0)
            constant: value=0
          TransformAxis translation2: axis=(0 1 0)
            constant: value=0
          TransformAxis translation3: axis=(0 0 1)
            constant: value=0
    Body C3: mass=0.001011556 mass_center=(-0.00777253 0.216474 0.328541) inertia_xx=2.398099e-8 inertia_yy=3.680362e-8
        inertia_zz=5.606505e-8 inertia_xy=3.225927e-9 inertia_xz=-4.409599e-9 inertia_yz=-1.872344e-9
        meshes=Foetus_Geometries\C3.vtp
      CustomJoint C3-C4: parent_body=C4 location_in_parent=(-0.01833938 0.1720249 -0.01503313)
          orientation_in_parent=(-0.4145616 0.07100961 0.1099977) location=(-0.01833938 0.1720249 -0.01503313)
          orientation=(-0.2867428 0.1374065 -0.02989943)
        Coordinate C3_To_C4_tilt: range=(-0.2618 0.2618)
        Coordinate C3_To_C4_rotation: range=(-0.2618 0.2618)
        Coordinate C3_To_C4_flexion_extension: range=(-0.2618 0.2618) default_value=-0.087266
        SpatialTransform:
          TransformAxis rotation1: coordinates=C3_To_C4_tilt axis=(1 0 0) LinearFunction(coefficients=1 0)
          TransformAxis rotation2: coordinates=C3_To_C4_rotation axis=(0 1 0) LinearFunction(coefficients=1 0)
          TransformAxis rotation3: coordinates=C3_To_C4_flexion_extension axis=(0 0 1) LinearFunction(coefficients=1 0)
          TransformAxis translation1: axis=(1 0 0)
            constant: value=0
          TransformAxis translation2: axis=(0 1 0)
            constant: value=0
          TransformAxis translation3: axis=(0 0 1)
            constant: value=0
    Body C2: mass=0.001365707 mass_center=(-0.00695084 0.215785 0.333476) inertia_xx=3.894004e-8 inertia_yy=5.079182e-8
        inertia_zz=8.198421e-8 inertia_xy=1.020557e-9 inertia_xz=-5.057339e-9 inertia_yz=-3.026645e-9
        meshes=Foetus_Geometries\C2.vtp
      CustomJoint C2-C3: parent_body=C3 location_in_parent=(-0.01725597 0.1766938 -0.01681766)
          orientation_in_parent=(-0.2876708 0.137558 -0.0307542) location=(-0.01725597 0.1766938 -0.01681766)
          orientation=(-0.2933438 0.1451746 -0.1610292)
        Coordinate C2_To_C3_tilt: range=(-0.2618 0.2618)
        Coordinate C2_To_C3_rotation: range=(-0.2618 0.2618)
        Coordinate C2_To_C3_flexion_extension: range=(-0.2618 0.2618) default_value=-0.087266
        SpatialTransform:
          TransformAxis rotation1: coordinates=C2_To_C3_tilt axis=(1 0 0) LinearFunction(coefficients=1 0)
          TransformAxis rotation2: coordinates=C2_To_C3_rotation axis=(0 1 0) LinearFunction(coefficients=1 0)
          TransformAxis rotation3: coordinates=C2_To_C3_flexion_extension axis=(0 0 1) LinearFunction(coefficients=1 0)
          TransformAxis translation1: axis=(1 0 0)
            constant: value=0
          TransformAxis translation2: axis=(0 1 0)
            constant: value=0
          TransformAxis translation3: axis=(0 0 1)
            constant: value=0
    Body C1: mass=0.0008816461 mass_center=(-0.006267 0.214484 0.339163) inertia_xx=1.864485e-8 inertia_yy=6.770963e-8
        inertia_zz=8.1337e-8 inertia_xy=9.038652e-9 inertia_xz=-6.5948e-9 inertia_yz=1.682194e-9
        meshes=Foetus_Geometries\C1.vtp
      CustomJoint C1-C2: parent_body=C2 location_in_parent=(-0.01578771 0.1818367 -0.01868108)
          orientation_in_parent=(-0.2931864 0.1461359 -0.1608791) location=(-0.01578771 0.1818367 -0.01868108)
          orientation=(-0.2452067 0.143759 -0.2876392)
        Coordinate C1_To_C2_tilt: range=(-0.2618 0.2618)
        Coordinate C1_To_C2_rotation: range=(-0.2618 0.2618)
        Coordinate C1_To_C2_flexion_extension: range=(-0.2618 0.2618) default_value=-0.087266
        SpatialTransform:
          TransformAxis rotation1: coordinates=C1_To_C2_tilt axis=(1 0 0) LinearFunction(coefficients=1 0)
          TransformAxis rotation2: coordinates=C1_To_C2_rotation axis=(0 1 0) LinearFunction(coefficients=1 0)
          TransformAxis rotation3: coordinates=C1_To_C2_flexion_extension axis=(0 0 1) LinearFunction(coefficients=1 0)
          TransformAxis translation1: axis=(1 0 0)
            constant: value=0
          TransformAxis translation2: axis=(0 1 0)
            constant: value=0
          TransformAxis translation3: axis=(0 0 1)
            constant: value=0
    Body Head: mass=0.8009351 mass_center=(-0.00138768 0.196898 0.367195) inertia_xx=0.001140736 inertia_yy=0.001049244
        inertia_zz=0.0008518092 inertia_xy=-4.01424e-5 inertia_xz=-8.479339e-6 inertia_yz=9.346884e-5
        meshes=Foetus_Geometries\Head.vtp
      CustomJoint Head-C1: parent_body=C1 location_in_parent=(-0.01920568 0.1887825 -0.01995087)
          orientation_in_parent=(-0.2445384 0.1425406 -0.2878779) location=(-0.01920568 0.1887825 -0.01995087)
          orientation=(-0.221779 0.1635346 -0.4556542)
        Coordinate Head_tilt: range=(-1.5708 1.5708)
        Coordinate Head_rotation: range=(-1.5708 1.5708)
        Coordinate Head_flexion_extension: default_value=-0.087266 range=(-1.5708 1.5708)
        SpatialTransform:
          TransformAxis rotation1: coordinates=Head_tilt axis=(1 0 0) LinearFunction(coefficients=1 0)
          TransformAxis rotation2: coordinates=Head_rotation axis=(0 1 0) LinearFunction(coefficients=1 0)
          TransformAxis rotation3: coordinates=Head_flexion_extension axis=(0 0 1) LinearFunction(coefficients=1 0)
          TransformAxis translation1: axis=(1 0 0)
            constant: value=0
          TransformAxis translation2: axis=(0 1 0)
            constant: value=0
          TransformAxis translation3: axis=(0 0 1)
            constant: value=0
    Body R_femur: mass=0.1214344 mass_center=(-0.0470881 0.209926 0.11155) inertia_xx=3.962147e-5
        inertia_yy=7.258937e-5 inertia_zz=7.972142e-5 inertia_xy=2.281632e-5 inertia_xz=1.069773e-5
        inertia_yz=5.63393e-6 meshes=Foetus_Geometries\R_femur.vtp
      CustomJoint R_hip: parent_body=Pelvis location_in_parent=(-0.003709839 -0.01906959 0.02563092)
          orientation_in_parent=(-0.006917402 0.004732441 -0.01618828) location=(-0.003709839 -0.01906959 0.02563092)
          orientation=(0.9592845 -1.105094 2.195793)
        Coordinate R_hip_adduction: range=(-2.0944 2.0944)
        Coordinate R_hip_rotation: range=(-2.0944 2.0944)
        Coordinate R_hip_flexion: range=(-2.0944 2.0944) default_value=1.745329
        SpatialTransform: axes_held_at_zero=(translation1 translation2 translation3)
          TransformAxis rotation1: coordinates=R_hip_adduction axis=(1 0 0) LinearFunction(coefficients=1 0)
          TransformAxis rotation2: coordinates=R_hip_rotation axis=(0 1 0) LinearFunction(coefficients=1 0)
          TransformAxis rotation3: coordinates=R_hip_flexion axis=(0 0 1) LinearFunction(coefficients=1 0)
    Body R_Lowerleg: mass=0.09097443 mass_center=(-0.0354177 0.203414 0.0726697) inertia_xx=2.90873e-5
        inertia_yy=9.461284e-5 inertia_zz=8.656568e-5 inertia_xy=1.45991e-5 inertia_xz=-2.295483e-5
        inertia_yz=-6.269121e-7 meshes=(Foetus_Geometries\R_tibia-fibula.vtp Foetus_Geometries\R_foot.vtp)
      CustomJoint R_knee: parent_body=R_femur location_in_parent=(0.02716932 -0.04566329 0.09620567)
          orientation_in_parent=(-2.861631 -0.3728765 2.855076) location=(0.02716932 -0.04566329 0.09620567)
          orientation=(-0.2889185 0.3477462 -2.264086)
        Coordinate R_knee_flexion: range=(-2.0944 0.17533) default_value=-2.0944
        SpatialTransform: axes_held_at_zero=(rotation2 rotation3 translation1 translation2 translation3)
          TransformAxis rotation1: coordinates=R_knee_flexion axis=(1 0 0) LinearFunction(coefficients=1 0)
    Body L_femur: mass=0.122245 mass_center=(0.0624577 0.209988 0.128053) inertia_xx=3.734005e-5 inertia_yy=7.371279e-5
        inertia_zz=8.307417e-5 inertia_xy=-2.342648e-5 inertia_xz=3.414654e-6 inertia_yz=-1.740847e-6
        meshes=Foetus_Geometries\L_femur.vtp
      CustomJoint L_hip: parent_body=Pelvis location_in_parent=(-0.003709906 -0.01906955 -0.02563074)
          orientation_in_parent=(0.006918871 -0.004729835 -0.0161883) location=(-0.003709906 -0.01906955 -0.02563074)
          orientation=(-0.9592873 1.105096 2.195797)
        Coordinate L_hip_adduction: range=(-2.0944 2.0944)
        Coordinate L_hip_rotation: range=(-2.0944 2.0944)
        Coordinate L_hip_flexion: range=(-2.0944 2.0944) default_value=1.745329
        SpatialTransform: axes_held_at_zero=(translation1 translation2 translation3)
          TransformAxis rotation1: coordinates=L_hip_adduction axis=(1 0 0) LinearFunction(coefficients=-1 0)
          TransformAxis rotation2: coordinates=L_hip_rotation axis=(0 1 0) LinearFunction(coefficients=-1 0)
          TransformAxis rotation3: coordinates=L_hip_flexion axis=(0 0 1) LinearFunction(coefficients=1 0)
    Body L_Lowerleg: mass=0.09278054 mass_center=(0.062733 0.202308 0.0874667) inertia_xx=4.881648e-5
        inertia_yy=9.789766e-5 inertia_zz=7.006271e-5 inertia_xy=-1.277106e-5 inertia_xz=3.660914e-5
        inertia_yz=-3.958714e-6 meshes=(Foetus_Geometries\L_tibia-fibula.vtp Foetus_Geometries\L_foot.vtp)
      CustomJoint L_knee: parent_body=L_femur location_in_parent=(0.02716907 -0.04566315 -0.09620561)
          orientation_in_parent=(-0.2802874 -0.3718347 0.2871468) location=(0.02716907 -0.04566315 -0.09620561)
          orientation=(-2.853724 0.3469215 -0.8773344)
        Coordinate L_knee_flexion: range=(-2.0944 0.17533) default_value=-2.0944
        SpatialTransform: axes_held_at_zero=(rotation2 rotation3 translation1 translation2 translation3)
          TransformAxis rotation1: coordinates=L_knee_flexion axis=(1 0 0) LinearFunction(coefficients=1 0)
    Body R_clavicle: mass=0.0008973526 mass_center=(-0.0331595 0.205208 0.299603) inertia_xx=5.623056e-8
        inertia_yy=1.293035e-7 inertia_zz=1.43351e-7 inertia_xy=-5.788518e-8 inertia_xz=-4.473179e-8
        inertia_yz=2.600985e-8 meshes=Foetus_Geometries\R_clavicle.vtp
      CustomJoint R_Sterno-Clav: parent_body=Thorax location_in_parent=(0.00134906 0.1412041 -0.002400135)
          orientation_in_parent=(-0.0879667 -0.02880411 0.1648551) location=(0.00134906 0.1412041 -0.002400135)
          orientation=(-0.4412693 -0.480539 -0.0110816)
        Coordinate R_clavicle_elevation: range=(-0.2618 0.2618) default_value=-0.261799
        Coordinate R_clavicle_protraction: range=(-0.5236 0.5236) default_value=-0.349066
        Coordinate R_clavicle_rotation: range=(-0.4363323 0.4363323)
        SpatialTransform:
          TransformAxis rotation1: coordinates=R_clavicle_elevation axis=(1 0 0) LinearFunction(coefficients=1 0)
          TransformAxis rotation2: coordinates=R_clavicle_protraction axis=(0 1 0) LinearFunction(coefficients=1 0)
          TransformAxis rotation3: coordinates=R_clavicle_rotation axis=(0 0 1) LinearFunction(coefficients=1 0)
          TransformAxis translation1: axis=(1 0 0)
            constant: value=0
          TransformAxis translation2: axis=(0 1 0)
            constant: value=0
          TransformAxis translation3: axis=(0 0 1)
            constant: value=0
    Body R_scapula: mass=0.002898431 mass_center=(-0.0403619 0.225097 0.289606) inertia_xx=2.480673e-7
        inertia_yy=2.150334e-7 inertia_zz=1.665054e-7 inertia_xy=6.64843e-8 inertia_xz=-4.836725e-9
        inertia_yz=-4.315752e-8 meshes=Foetus_Geometries\R_scapula.vtp
      CustomJoint R_Acromio-Clav: parent_body=R_clavicle location_in_parent=(-0.01995854 0.1517589 0.03414481)
          orientation_in_parent=(-0.4422241 -0.4793666 -0.01218831) location=(-0.01995854 0.1517589 0.03414481)
          orientation=(-0.3225505 0.6763967 0.1026265)
        Coordinate R_scapula_mediolat_rotation: range=(-0.4363323 0.4363323)
        Coordinate R_scapula_protraction: range=(0.7854 1.5708) default_value=1.134464
        Coordinate R_scapula_anteropost_tilt: range=(-0.7854 0.2618)
        SpatialTransform:
          TransformAxis rotation1: coordinates=R_scapula_mediolat_rotation axis=(1 0 0)
              LinearFunction(coefficients=1 0)
          TransformAxis rotation2: coordinates=R_scapula_protraction axis=(0 1 0) LinearFunction(coefficients=1 0)
          TransformAxis rotation3: coordinates=R_scapula_anteropost_tilt axis=(0 0 1) LinearFunction(coefficients=1 0)
          TransformAxis translation1: axis=(1 0 0)
            constant: value=0
          TransformAxis translation2: axis=(0 1 0)
            constant: value=0
          TransformAxis translation3: axis=(0 0 1)
            constant: value=0
    Body R_humerus: mass=0.06672075 mass_center=(-0.0592471 0.220846 0.266875) inertia_xx=3.924471e-5
        inertia_yy=3.53493e-5 inertia_zz=1.150162e-5 inertia_xy=-1.364789e-6 inertia_xz=4.551133e-6
        inertia_yz=-8.39303e-6 meshes=Foetus_Geometries\R_humerus.vtp
      CustomJoint R_Shoulder: parent_body=R_scapula location_in_parent=(-0.01718936 0.1445846 0.03288253)
          orientation_in_parent=(-0.3224572 0.6764042 0.102568) location=(-0.01718926 0.144584 0.03287858)
          orientation=(-0.3538139 0.005670948 -0.196254)
        Coordinate R_shoulder_abduction_adduction: range=(0 2.007129)
        Coordinate R_shoulder_rotation: range=(-0.7854 0.7854)
        Coordinate R_shoulder_flexion_extension: range=(-1.5708 2.007129) default_value=0.785398
        SpatialTransform: axes_held_at_zero=(translation1 translation2 translation3)
          TransformAxis rotation1: coordinates=R_shoulder_abduction_adduction axis=(1 0 0)
              LinearFunction(coefficients=-1 0)
          TransformAxis rotation2: coordinates=R_shoulder_rotation axis=(0 1 0) LinearFunction(coefficients=1 0)
          TransformAxis rotation3: coordinates=R_shoulder_flexion_extension axis=(0 0 1)
              LinearFunction(coefficients=1 0)
    Body R_Forearm: mass=0.06130985 mass_center=(-0.0676871 0.219688 0.183319) inertia_xx=5.396833e-5
        inertia_yy=5.139082e-5 inertia_zz=9.733415e-6 inertia_xy=-1.480265e-7 inertia_xz=-4.273659e-6
        inertia_yz=1.107911e-5 meshes=(Foetus_Geometries\R_radius-ulna.vtp Foetus_Geometries\R_hand.vtp)
      CustomJoint R_elbow: parent_body=R_humerus location_in_parent=(-0.03079181 0.08342842 0.05505975)
          orientation_in_parent=(-0.3543116 0.005172059 -0.1963771) location=(-0.03079181 0.08342842 0.05505975)
          orientation=(-2.849379 1.120434 2.446083)
        Coordinate R_elbow_flexion: range=(0 2.0944) default_value=1.570796
        SpatialTransform: axes_held_at_zero=(rotation1 rotation2 translation1 translation2 translation3)
          TransformAxis rotation3: coordinates=R_elbow_flexion axis=(0 0 1) LinearFunction(coefficients=1 0)
    Body L_clavicle: mass=0.0008970351 mass_center=(0.0150497 0.204947 0.301504) inertia_xx=6.245375e-8
        inertia_yy=1.349681e-7 inertia_zz=1.313177e-7 inertia_xy=5.044315e-8 inertia_xz=5.583231e-8
        inertia_yz=2.964259e-8 meshes=Foetus_Geometries\L_clavicle.vtp
      CustomJoint L_Sterno-Clav: parent_body=Thorax location_in_parent=(0.001686025 0.1401508 -0.01434862)
          orientation_in_parent=(-0.08714548 -0.02765559 0.1648218) location=(0.001686025 0.1401508 -0.01434862)
          orientation=(0.2571209 0.427467 0.01021859)
        Coordinate L_clavicle_elevation: range=(-0.2618 0.2618) default_value=-0.261799
        Coordinate L_clavicle_protraction: range=(-0.5236 0.5236) default_value=-0.349066
        Coordinate L_clavicle_rotation: range=(-0.4363323 0.4363323)
        SpatialTransform:
          TransformAxis rotation1: coordinates=L_clavicle_elevation axis=(1 0 0) LinearFunction(coefficients=-1 0)
          TransformAxis rotation2: coordinates=L_clavicle_protraction axis=(0 1 0) LinearFunction(coefficients=-1 0)
          TransformAxis rotation3: coordinates=L_clavicle_rotation axis=(0 0 1) LinearFunction(coefficients=1 0)
          TransformAxis translation1: axis=(1 0 0)
            constant: value=0
          TransformAxis translation2: axis=(0 1 0)
            constant: value=0
          TransformAxis translation3: axis=(0 0 1)
            constant: value=0
    Body L_scapula: mass=0.00289857 mass_center=(0.0257484 0.223133 0.291394) inertia_xx=2.590836e-7
        inertia_yy=2.110938e-7 inertia_zz=1.594676e-7 inertia_xy=-5.506082e-8 inertia_xz=-9.6013e-9
        inertia_yz=-4.882764e-8 meshes=Foetus_Geometries\L_scapula.vtp
      CustomJoint L_Acromio-Clav: parent_body=L_clavicle location_in_parent=(-0.01747895 0.1440634 -0.0533162)
          orientation_in_parent=(0.2576029 0.4262476 0.008492602) location=(-0.01747895 0.1440634 -0.0533162)
          orientation=(0.1600363 -0.7315423 0.1214449)
        Coordinate L_scapula_mediolat_rotation: range=(-0.4363323 0.4363323)
        Coordinate L_scapula_protraction: range=(0.7854 1.5708) default_value=1.134464
        Coordinate L_scapula_anteropost_tilt: range=(-0.7854 0.2618)
        SpatialTransform:
          TransformAxis rotation1: coordinates=L_scapula_mediolat_rotation axis=(1 0 0)
              LinearFunction(coefficients=-1 0)
          TransformAxis rotation2: coordinates=L_scapula_protraction axis=(0 1 0) LinearFunction(coefficients=-1 0)
          TransformAxis rotation3: coordinates=L_scapula_anteropost_tilt axis=(0 0 1) LinearFunction(coefficients=1 0)
          TransformAxis translation1: axis=(1 0 0)
            constant: value=0
          TransformAxis translation2: axis=(0 1 0)
            constant: value=0
          TransformAxis translation3: axis=(0 0 1)
            constant: value=0
    Body L_humerus: mass=0.06668816 mass_center=(0.047487 0.215188 0.272528) inertia_xx=3.649632e-5
        inertia_yy=3.683453e-5 inertia_zz=1.270077e-5 inertia_xy=2.089177e-6 inertia_xz=-9.668637e-6
        inertia_yz=-5.375328e-6 meshes=Foetus_Geometries\L_humerus.vtp
      CustomJoint L_Shoulder: parent_body=L_scapula location_in_parent=(-0.01482337 0.1372274 -0.05065784)
          orientation_in_parent=(0.1576373 -0.7310254 0.1196201) location=(-0.01482337 0.1372274 -0.05065784)
          orientation=(0.1785486 -0.06009565 -0.1815495)
        Coordinate L_shoulder_abduction_adduction: range=(0 2.007129)
        Coordinate L_shoulder_rotation: range=(-0.7854 0.7854)
        Coordinate L_shoulder_flexion_extension: range=(-1.5708 2.007129) default_value=0.785398
        SpatialTransform: axes_held_at_zero=(translation1 translation2 translation3)
          TransformAxis rotation1: coordinates=L_shoulder_abduction_adduction axis=(1 0 0)
              LinearFunction(coefficients=1 0)
          TransformAxis rotation2: coordinates=L_shoulder_rotation axis=(0 1 0) LinearFunction(coefficients=-1 0)
          TransformAxis rotation3: coordinates=L_shoulder_flexion_extension axis=(0 0 1)
              LinearFunction(coefficients=1 0)
    Body L_Forearm: mass=0.06127872 mass_center=(0.068995 0.205714 0.191899) inertia_xx=5.445479e-5
        inertia_yy=4.914125e-5 inertia_zz=1.143073e-5 inertia_xy=-1.447442e-6 inertia_xz=-1.715857e-6
        inertia_yz=1.41929e-5 meshes=(Foetus_Geometries\L_radius-ulna.vtp Foetus_Geometries\L_hand.vtp)
      CustomJoint L_elbow: parent_body=L_humerus location_in_parent=(-0.0274642 0.07307911 -0.06255236)
          orientation_in_parent=(0.1795888 -0.0593232 -0.1818058) location=(-0.0274642 0.07307911 -0.06255236)
          orientation=(2.713003 -1.067392 2.4897)
        Coordinate L_elbow_flexion: range=(0 2.0944) default_value=1.570796
        SpatialTransform: axes_held_at_zero=(rotation1 rotation2 translation1 translation2 translation3)
          TransformAxis rotation3: coordinates=L_elbow_flexion axis=(0 0 1) LinearFunction(coefficients=1 0)
  ForceSet:
    Thelen2003Muscle [values shared by the 127 below unless stated]: min_control=0 max_control=1
        max_isometric_force=1000 optimal_fiber_length=0.1 tendon_slack_length=0.2
        pennation_angle_at_optimal=0 [radians]
    Thelen2003Muscle R_Glut_max_1:
      PathPoint R_Glut_max_1_origin: Pelvis (-0.0237205 0.00596185 0.0158824)
      PathPoint R_Glut_max_1_via1: Pelvis (-0.0202398 -0.00516671 0.0176016)
      PathPoint R_Glut_max_1_via2: R_femur (-0.0032204 -0.0351895 0.0292647)
      PathPoint R_Glut_max_1_insertion: R_femur (-0.00588654 -0.0339764 0.03748)
    Thelen2003Muscle R_Glut_max_2:
      PathPoint R_Glut_max_2_origin: Pelvis (-0.0248142 0.000454929 0.0106837)
      PathPoint R_Glut_max_2_via1: Pelvis (-0.00886692 -0.02414 0.0196796)
      PathPoint R_Glut_max_2_via2: R_femur (0.000598999 -0.0356054 0.0340965)
      PathPoint R_Glut_max_2_insertion: R_femur (-0.00321931 -0.0335264 0.0425644)
    Thelen2003Muscle R_Glut_max_3:
      PathPoint R_Glut_max_3_origin: Pelvis (-0.0257151 -0.0170239 0.00207277)
      PathPoint R_Glut_max_3_via1: Pelvis (-0.0132003 -0.0330514 0.00961151)
      PathPoint R_Glut_max_3_via2: R_femur (0.00616743 -0.0327613 0.0410178)
      PathPoint R_Glut_max_3_insertion: R_femur (-0.000901776 -0.03352 0.047805)
    Thelen2003Muscle R_Glut_med_1:
      PathPoint R_Glut_med_1_origin: Pelvis (-0.00616869 0.0051811 0.0311013)
      PathPoint R_Glut_med_1_insertion: R_femur (-0.0102403 -0.0310829 0.0301319)
    Thelen2003Muscle R_Glut_med_2:
      PathPoint R_Glut_med_2_origin: Pelvis (-0.0164346 0.0056924 0.0198942)
      PathPoint R_Glut_med_2_insertion: R_femur (-0.00924097 -0.0314037 0.0291256)
    Thelen2003Muscle R_Glut_med_3:
      PathPoint R_Glut_med_3_origin: Pelvis (-0.0193329 -0.0027121 0.0139316)
      PathPoint R_Glut_med_3_insertion: R_femur (-0.0083807 -0.0327633 0.0295612)
    Thelen2003Muscle R_TFL:
      PathPoint R_TFL_origin: Pelvis (-0.00469942 0.00405132 0.0319271)
      PathPoint R_TFL_via1: R_femur (-0.00595724 -0.0319346 0.0453709)
      PathPoint R_TFL_via2: R_femur (0.0139415 -0.0414807 0.0922008)
      PathPoint R_TFL_insertion: R_Lowerleg (0.0216173 -0.0576549 0.0884886)
    Thelen2003Muscle R_SAR:
      PathPoint R_SAR_origin: Pelvis (-2.00215e-6 -2.55033e-6 0.031457)
      PathPoint R_SAR_via1: R_femur (0.0257536 -0.0348407 0.076017)
      PathPoint R_SAR_via2: R_Lowerleg (0.0296178 -0.0486125 0.0804003)
      PathPoint R_SAR_insertion: R_Lowerleg (0.029349 -0.0546398 0.0774081)
    Thelen2003Muscle R_Add_Mag:
      PathPoint R_ADDmag_origin: Pelvis (-0.000800114 -0.0300069 0.00667251)
      PathPoint R_ADDmag_insertion: R_femur (0.00934061 -0.0341599 0.0617895)
    Thelen2003Muscle R_Iliacus:
      PathPoint R_iliacus_origin: Pelvis (-0.00679415 0.003366 0.021796)
      PathPoint R_iliacus_via1: Pelvis (0.00378355 -0.0105078 0.0166008)
      PathPoint R_iliacus_via2: R_femur (0.00376653 -0.0234029 0.0254863)
      PathPoint R_iliacus_insertion: R_femur (0.00126327 -0.0325477 0.0342197)
    Thelen2003Muscle R_Rect_fem:
      PathPoint R_rect_fem_origin: Pelvis (2.23867e-5 -0.00623237 0.0256308)
      PathPoint R_rect_fem_insertion: R_Lowerleg (0.0211734 -0.0302522 0.0935068)
    Thelen2003Muscle R_psoas:
      PathPoint R_psoas_origin: Pelvis (-0.0141726 0.0194601 0.00868263)
      PathPoint R_psoas_via1: Pelvis (0.00386457 -0.0111963 0.0157429)
      PathPoint R_psoas_via2: R_femur (0.00376653 -0.0234029 0.0254863)
      PathPoint R_psoas_insertion: R_femur (0.00126327 -0.0325477 0.0342197)
    Thelen2003Muscle R_Bic_Fem_lg:
      PathPoint R_BIC_fem_lg_origin: Pelvis (-0.00890272 -0.030826 0.0129036)
      PathPoint R_BIC_fem_via1: R_Lowerleg (0.0217748 -0.0564285 0.0887067)
      PathPoint R_BIC_fem_insertion: R_Lowerleg (0.0170732 -0.0585941 0.0874174)
    Thelen2003Muscle R_Bic_Fem_sh:
      PathPoint R_BIC_fem_sh_origin: R_femur (0.00896757 -0.0344665 0.0617283)
      PathPoint R_BIC_fem_via1: R_Lowerleg (0.0217748 -0.0564285 0.0887067)
      PathPoint R_BIC_fem_insertion: R_Lowerleg (0.0170732 -0.0585941 0.0874174)
    Thelen2003Muscle R_Vast_int:
      PathPoint R_vast_int_origin: R_femur (0.0034561 -0.0278397 0.0568237)
      PathPoint R_vast_int_insertion: R_Lowerleg (0.0210618 -0.0292317 0.0935305)
    Thelen2003Muscle R_Med_gastroc:
      PathPoint R_med_gas_origin: R_femur (0.0268029 -0.0385232 0.0854779)
      PathPoint R_med_gas_insertion: R_Lowerleg (-9.54522e-5 -0.0746894 0.0166875)
    Thelen2003Muscle R_obl_ext:
      PathPoint R_obl_ext_origin: Thorax (-0.013306 0.0620055 0.0442359)
      PathPoint R_obl_ext_insertion: Pelvis (0.00636891 -0.0199464 0.00243019)
    Thelen2003Muscle R_obl_int:
      PathPoint R_obl_int_origin: Pelvis (-0.00670191 0.011224 0.0283121)
      PathPoint R_obl_int_insertion: Thorax (0.0227581 0.0692461 -0.00376624)
    Thelen2003Muscle R_Rect_abd:
      PathPoint R_rect_abd_origin: Thorax (0.0147726 0.0969898 0.0263505)
      PathPoint R_rect_abd_via1: Pelvis (0.00472957 -0.000742058 0.0153639)
      PathPoint R_rect_abd_insertion: Pelvis (0.00731199 -0.0197176 0.00223937)
    Thelen2003Muscle R_Sterno_Mast:
      PathPoint R_SCM_origin: Head (-0.00772742 0.198923 0.00558126)
      PathPoint R_sterno_mastoid_insertion: R_clavicle (0.00279283 0.142786 -0.00199236)
    Thelen2003Muscle R_Cleido_Mast:
      PathPoint R_SCM_origin: Head (-0.00772742 0.198923 0.00558126)
      PathPoint R_cleido_mastoid_insertion: R_clavicle (0.000328356 0.146473 0.00574332)
    Thelen2003Muscle R_Cleido_Occ:
      PathPoint R_cleido_occ_origin: Head (-0.021592 0.205573 0.00566392)
      PathPoint R_cleido_occ_insertion: R_clavicle (0.000327859 0.146468 0.00574014)
    Thelen2003Muscle R_SCA_ant:
      PathPoint R_SCAant_origin: C4 (-0.0161175 0.173428 -0.00694947)
      PathPoint R_SCAant_insertion: Thorax (-0.00659809 0.142245 0.0091036)
    Thelen2003Muscle R_SCA_med:
      PathPoint R_SCAmed_origin: C3 (-0.0153116 0.178964 -0.00591616)
      PathPoint R_SCAmed_insertion: Thorax (-0.0136893 0.143785 0.00929696)
    Thelen2003Muscle R_SCA_post:
      PathPoint R_SCApost_origin: C5 (-0.0198429 0.169779 -0.00158293)
      PathPoint R_SCApost_insertion: Thorax (-0.00661416 0.13211 0.0169893)
    Thelen2003Muscle Long_col:
      PathPoint Long_col__c1thx_origin: C1 (-0.013458 0.183809 -0.0197985)
      PathPoint Long_col_via1: C2 (-0.0129133 0.178577 -0.0182907)
      PathPoint Long_col_via2: C3 (-0.013935 0.173988 -0.0166222)
      PathPoint Long_col_via3: C4 (-0.0155831 0.169023 -0.0148543)
      PathPoint Long_col_via4: C5 (-0.0150394 0.163901 -0.0133591)
      PathPoint Long_col_via5: C6 (-0.0142754 0.158274 -0.0123228)
      PathPoint Long_col_via6: C7 (-0.0145783 0.152632 -0.0115487)
      PathPoint Long_col_via7: Thorax (-0.0152167 0.145989 -0.0106576)
      PathPoint Long_col_insertion: Thorax (-0.0167016 0.137426 -0.00935248)
    Thelen2003Muscle R_Splen_cap:
      PathPoint R_splen_cap_sklT1_origin: Head (-0.020776 0.20142 0.00359062)
      PathPoint splen_cap_sklT1_insertion: Thorax (-0.0330264 0.146247 -0.0101832)
    Thelen2003Muscle R_Trap_Cl:
      PathPoint TRAP_CL_origin: Head (-0.053607 0.221602 -0.0203662)
      PathPoint R_TRAP_CL_insertion: R_clavicle (-0.0134452 0.156119 0.0159063)
    Thelen2003Muscle R_Trap_Acr:
      PathPoint R_TRAP_ACR_origin: Thorax (-0.0330261 0.152789 -0.0108275)
      PathPoint R_TRAP_ACR_insertion: R_scapula (-0.0230698 0.15045 0.0250996)
    Thelen2003Muscle R_Splen_cerv:
      PathPoint R_splen_cerv_origin: C3 (-0.0216775 0.177569 -0.00453397)
      PathPoint splen_cerv_insertion: Thorax (-0.0355601 0.132229 -0.00891074)
    Thelen2003Muscle R_Semi_cap:
      PathPoint R_semi_cap_origin: Thorax (-0.0245707 0.153023 0.00200786)
      PathPoint R_semi_cap_insertion: Head (-0.0469548 0.211518 -0.0150129)
    Thelen2003Muscle R_Semi_cerv:
      PathPoint R_semi_cerv_origin: Thorax (-0.0283416 0.146525 0.00131168)
      PathPoint semi_cerv_insertion: C3 (-0.0307281 0.1742 -0.0141755)
    Thelen2003Muscle R_Lev_scap:
      PathPoint R_Levator_scap_origin: C1 (-0.017431 0.189056 -0.00350954)
      PathPoint R_Levator_scap_insertion: R_scapula (-0.0329055 0.148227 0.0101874)
    Thelen2003Muscle R_QL_costo_iliac:
      PathPoint R_QL_costo_iliac_origin: Thorax (-0.0264861 0.0603361 0.013721)
      PathPoint R_QL_costo_iliac_insertion: Pelvis (-0.0166865 0.0140052 0.0210958)
    Thelen2003Muscle R_QL_costo_trans_L1:
      PathPoint R_QL_costo_trans_origin: Thorax (-0.0259885 0.0604682 0.0119112)
      PathPoint R_QL_costo_trans_L1_insertion: Lumbar (-0.0255144 0.0463919 0.009222)
    Thelen2003Muscle R_QL_costo_trans_L5:
      PathPoint R_QL_costo_trans_origin: Thorax (-0.0259885 0.0604682 0.0119112)
      PathPoint R_QL_costo_trans_L5_insertion: Lumbar (-0.0180931 0.0175931 0.0114707)
    Thelen2003Muscle R_QL_ilio_trans_L1:
      PathPoint R_QL_ilio_trans_L1_origin: Lumbar (-0.0255144 0.0463919 0.009222)
      PathPoint R_QL_costo_iliac_insertion: Pelvis (-0.0166865 0.0140052 0.0210958)
    Thelen2003Muscle R_QL_ilio_trans_L5:
      PathPoint R_QL_ilio_trans_L5_origin: Lumbar (-0.0180931 0.0175931 0.0114707)
      PathPoint R_QL_costo_iliac_insertion: Pelvis (-0.0166865 0.0140052 0.0210958)
    Thelen2003Muscle R_LD_T7:
      PathPoint R_LD_T7_origin: Thorax (-0.0358837 0.100563 -0.00597096)
      PathPoint R_LD_T7_via1: Thorax (-0.0318014 0.10158 0.0240832)
      PathPoint R_LD_insertion: R_humerus (-0.0177298 0.138405 0.0416298)
    Thelen2003Muscle R_LD_T8:
      PathPoint R_LD_T8_origin: Thorax (-0.0355847 0.0922787 -0.00530421)
      PathPoint R_LD_T8_via1: Thorax (-0.0330049 0.09515 0.0238885)
      PathPoint R_LD_insertion: R_humerus (-0.0177298 0.138405 0.0416298)
    Thelen2003Muscle R_LD_T9:
      PathPoint R_LD_T9_origin: Thorax (-0.034781 0.0843728 -0.00475112)
      PathPoint R_LD_T9_via1: Thorax (-0.0338935 0.0885093 0.0231401)
      PathPoint R_LD_insertion: R_humerus (-0.0177298 0.138405 0.0416298)
    Thelen2003Muscle R_LD_T10:
      PathPoint R_LD_T10_origin: Thorax (-0.0347117 0.0764943 -0.00397557)
      PathPoint R_LD_T10_via1: Thorax (-0.034091 0.0823255 0.0227164)
      PathPoint R_LD_insertion: R_humerus (-0.0177298 0.138405 0.0416298)
    Thelen2003Muscle R_LD_T11:
      PathPoint R_LD_T11_origin: Thorax (-0.0344574 0.0671178 -0.00286396)
      PathPoint R_LD_T11_via1: Thorax (-0.0347287 0.0768267 0.0236083)
      PathPoint R_LD_insertion: R_humerus (-0.0177298 0.138405 0.0416298)
    Thelen2003Muscle R_LD_T12:
      PathPoint R_LD_T12_origin: Thorax (-0.0336518 0.0579844 -0.00208162)
      PathPoint R_LD_T12_via1: Thorax (-0.0351857 0.0733301 0.0251337)
      PathPoint R_LD_insertion: R_humerus (-0.0177298 0.138405 0.0416298)
    Thelen2003Muscle R_LD_L1:
      PathPoint R_LD_L1_origin: Lumbar (-0.0324046 0.0481944 -0.00127017)
      PathPoint R_LD_L_via1: Thorax (-0.0335204 0.0706246 0.03)
      PathPoint R_LD_insertion: R_humerus (-0.0177298 0.138405 0.0416298)
    Thelen2003Muscle R_LD_L2:
      PathPoint R_LD_L2_origin: Lumbar (-0.0299658 0.0382075 -0.000564606)
      PathPoint R_LD_L_via1: Thorax (-0.0335204 0.0706246 0.03)
      PathPoint R_LD_insertion: R_humerus (-0.0177298 0.138405 0.0416298)
    Thelen2003Muscle R_LD_L3:
      PathPoint R_LD_L3_origin: Lumbar (-0.0277197 0.0285403 0.000480392)
      PathPoint R_LD_L_via1: Thorax (-0.0335204 0.0706246 0.03)
      PathPoint R_LD_insertion: R_humerus (-0.0177298 0.138405 0.0416298)
    Thelen2003Muscle R_LD_L4:
      PathPoint R_LD_L4_origin: Lumbar (-0.0265978 0.0202465 0.0014284)
      PathPoint R_LD_L_via1: Thorax (-0.0335204 0.0706246 0.03)
      PathPoint R_LD_insertion: R_humerus (-0.0177298 0.138405 0.0416298)
    Thelen2003Muscle R_LD_L5:
      PathPoint R_LD_L5_origin: Lumbar (-0.0246631 0.0132824 0.00207948)
      PathPoint R_LD_L_via1: Thorax (-0.0335204 0.0706246 0.03)
      PathPoint R_LD_insertion: R_humerus (-0.0177298 0.138405 0.0416298)
    Thelen2003Muscle R_LD_iliac:
      PathPoint R_LD_iliac_origin: Pelvis (-0.0198081 0.0104412 0.0146787)
      PathPoint R_LD_L_via1: Thorax (-0.0335204 0.0706246 0.03)
      PathPoint R_LD_insertion: R_humerus (-0.0177298 0.138405 0.0416298)
    Thelen2003Muscle R_BIC_long:
      PathPoint R_BIClong_orig: R_scapula (-0.020749 0.14611 0.0275595)
      PathPoint R_BIClong_via_2: R_humerus (-0.0125749 0.141828 0.0361007)
      PathPoint R_BIClong_via_3: R_humerus (-0.0101968 0.140848 0.0388364)
      PathPoint R_BIClong_via_4: R_humerus (-0.00771044 0.136212 0.0405075)
      PathPoint R_BIClong_via_5: R_humerus (-0.0102987 0.131216 0.0407777)
      PathPoint R_BIClong_via_6: R_humerus (-0.0148064 0.122359 0.0440027)
      PathPoint R_BIClong_via_7: R_humerus (-0.0195168 0.10569 0.0489485)
      PathPoint R_BICall_ins: R_Forearm (-0.0208407 0.0707826 0.0620833)
    Thelen2003Muscle R_BIC_short:
      PathPoint R_BICshort_orig: R_scapula (-0.0163492 0.146351 0.0266498)
      PathPoint R_BICshort_via_1: R_humerus (-0.0149824 0.130621 0.0353356)
      PathPoint R_BICshort_via_2: R_humerus (-0.0164892 0.122689 0.0416195)
      PathPoint R_BICshort_via_3: R_humerus (-0.0195185 0.105687 0.0489533)
      PathPoint R_BICall_ins: R_Forearm (-0.0208407 0.0707826 0.0620833)
    Thelen2003Muscle R_BRA:
      PathPoint R_BRA_orig: R_humerus (-0.0203199 0.106219 0.0492006)
      PathPoint R_BRA_via_1: R_humerus (-0.026254 0.0837254 0.0546455)
      PathPoint R_BRA_ins: R_Forearm (-0.0277623 0.0683869 0.0585889)
    Thelen2003Muscle R_DELT1:
      PathPoint R_DELT1_origin: R_clavicle (-0.0111718 0.154247 0.0170938)
      PathPoint R_DELT1_via_1: R_humerus (-0.00435359 0.145386 0.0320947)
      PathPoint R_DELT1_insertion: R_humerus (-0.0156925 0.118634 0.0477853)
    Thelen2003Muscle R_DELT2:
      PathPoint R_DELT2_origin: R_scapula (-0.0177697 0.153555 0.0321437)
      PathPoint R_DELT2_via_1: R_humerus (-0.00590914 0.141137 0.040815)
      PathPoint R_DELT2_via_2: R_humerus (-0.0115149 0.122757 0.0466059)
      PathPoint R_DELT2_insertion: R_humerus (-0.0170583 0.116075 0.0487264)
    Thelen2003Muscle R_DELT3:
      PathPoint R_DELT3_origin: R_scapula (-0.0251798 0.151627 0.025534)
      PathPoint R_DELT3_via_1: R_humerus (-0.0112669 0.140165 0.0478576)
      PathPoint R_DELT3_insertion: R_humerus (-0.0126922 0.12502 0.0457339)
    Thelen2003Muscle R_PEC1:
      PathPoint R_PEC1_origin: R_clavicle (-0.00309571 0.147864 0.0104778)
      PathPoint R_PEC1_via_1: R_clavicle (-0.00622264 0.138691 0.0277795)
      PathPoint R_PEC1_via_2: R_humerus (-0.010276 0.130463 0.0409345)
      PathPoint R_PEC_insertion: R_humerus (-0.0100161 0.130431 0.0441341)
    Thelen2003Muscle R_PEC2:
      PathPoint R_PEC2_origin: Thorax (0.021548 0.11632 -0.00606012)
      PathPoint R_PEC2_via_1: Thorax (0.0160053 0.117862 0.00707758)
      PathPoint R_PEC2_via_2: Thorax (0.00782879 0.122563 0.025457)
      PathPoint R_PEC2_via_3: Thorax (-0.012803 0.128085 0.0405577)
      PathPoint R_PEC_insertion: R_humerus (-0.0100161 0.130431 0.0441341)
    Thelen2003Muscle R_SUPSP:
      PathPoint R_SUPSP_origin: R_scapula (-0.0274821 0.148228 0.0167953)
      PathPoint R_SUPSP_via_1: R_scapula (-0.019381 0.154661 0.0302386)
      PathPoint R_SUPSP_insertion: R_humerus (-0.00887232 0.139156 0.0435424)
    Thelen2003Muscle R_INFSP:
      PathPoint R_INFSP_origin: R_scapula (-0.0271342 0.135103 0.0260335)
      PathPoint R_INFSP_via_1: R_scapula (-0.0162053 0.139124 0.04498)
      PathPoint R_INFSP_insertion: R_humerus (-0.0103081 0.138947 0.0448729)
    Thelen2003Muscle R_SUBSC:
      PathPoint R_SUBSC_origin: R_scapula (-0.0288237 0.139769 0.0196199)
      PathPoint R_SUBSC_via_1: R_scapula (-0.0153365 0.134128 0.0285594)
      PathPoint R_SUBSC_insertion: R_humerus (-0.0110517 0.137322 0.034453)
    Thelen2003Muscle R_Tmin:
      PathPoint R_TMIN_origin: R_scapula (-0.0301129 0.128873 0.0258819)
      PathPoint R_TMIN_via_1: R_humerus (-0.016251 0.133895 0.0457633)
      PathPoint R_TMIN_insertion: R_humerus (-0.011629 0.134552 0.0456411)
    Thelen2003Muscle R_Tmaj:
      PathPoint R_TMAJ_origin: R_scapula (-0.0310883 0.123905 0.0264425)
      PathPoint R_TMAJ_via_1: R_scapula (-0.0287879 0.123415 0.0272097)
      PathPoint R_TMAJ_insertion: R_humerus (-0.0135462 0.126184 0.0415567)
    Thelen2003Muscle R_CORB:
      PathPoint R_CORB_origin: R_scapula (-0.0167268 0.146793 0.0239684)
      PathPoint R_CORB_via_1: R_scapula (-0.0131275 0.138498 0.0278749)
      PathPoint R_CORB_insertion: R_humerus (-0.0196676 0.109327 0.0472099)
    Thelen2003Muscle L_Glut_max_1:
      PathPoint L_Glut_max_1_origin: Pelvis (-0.0237233 0.00595904 -0.0158777)
      PathPoint L_Glut_max_1_via1: Pelvis (-0.0202433 -0.00516531 -0.0176052)
      PathPoint L_Glut_max_1_via2: L_femur (-0.0032191 -0.0351842 -0.029264)
      PathPoint L_Glut_max_1_insertion: L_femur (-0.00588441 -0.0339716 -0.0374806)
    Thelen2003Muscle L_Glut_max_2:
      PathPoint L_Glut_max_2_origin: Pelvis (-0.0248142 0.000455222 -0.0106858)
      PathPoint L_Glut_max_2_via1: Pelvis (-0.0088694 -0.0241445 -0.0196778)
      PathPoint L_Glut_max_2_via2: L_femur (0.000603178 -0.0356006 -0.0340928)
      PathPoint L_Glut_max_2_insertion: L_femur (-0.00322252 -0.033527 -0.042568)
    Thelen2003Muscle L_Glut_max_3:
      PathPoint L_Glut_max_3_origin: Pelvis (-0.0257194 -0.0170273 -0.00207116)
      PathPoint L_Glut_max_3_via1: Pelvis (-0.0132024 -0.0330476 -0.00960963)
      PathPoint L_Glut_max_3_via2: L_femur (0.00616973 -0.0327607 -0.0410174)
      PathPoint L_Glut_max_3_insertion: L_femur (-0.000905653 -0.0335248 -0.0478024)
    Thelen2003Muscle L_Glut_med_1:
      PathPoint L_Glut_med_1_origin: Pelvis (-0.00617307 0.00517909 -0.031105)
      PathPoint L_Glut_med_1_insertion: L_femur (-0.0102421 -0.0310808 -0.0301365)
    Thelen2003Muscle L_Glut_med_2:
      PathPoint L_Glut_med_2_origin: Pelvis (-0.0164385 0.00569552 -0.019896)
      PathPoint L_Glut_med_2_insertion: L_femur (-0.00923718 -0.031398 -0.0291225)
    Thelen2003Muscle L_Glut_med_3:
      PathPoint L_Glut_med_3_origin: Pelvis (-0.0193336 -0.00270945 -0.0139354)
      PathPoint L_Glut_med_3_insertion: L_femur (-0.00837905 -0.0327584 -0.0295574)
    Thelen2003Muscle L_TFL:
      PathPoint L_TFL_origin: Pelvis (-0.00469995 0.00404582 -0.0319304)
      PathPoint L_TFL_via1: L_femur (-0.00595412 -0.0319323 -0.0453728)
      PathPoint L_TFL_via2: L_femur (0.013941 -0.0414771 -0.0922037)
      PathPoint L_TFL_insertion: L_Lowerleg (0.0216195 -0.0576593 -0.0884876)
    Thelen2003Muscle L_SAR:
      PathPoint L_SAR_origin: Pelvis (3.13372e-7 -3.9226e-6 -0.0314528)
      PathPoint L_SAR_via1: L_femur (0.0257575 -0.0348357 -0.0760172)
      PathPoint L_SAR_via2: L_Lowerleg (0.029622 -0.0486126 -0.0803999)
      PathPoint L_SAR_insertion: L_Lowerleg (0.0293454 -0.0546359 -0.0774047)
    Thelen2003Muscle L_Add_Mag:
      PathPoint L_ADDmag_origin: Pelvis (-0.000802796 -0.0300054 -0.00667133)
      PathPoint L_ADDmag_insertion: L_femur (0.00933625 -0.0341616 -0.0617848)
    Thelen2003Muscle L_iliacus:
      PathPoint L_iliacus_origin: Pelvis (-0.00679713 0.00336195 -0.0217984)
      PathPoint L_iliacus_via1: Pelvis (0.00378358 -0.0105105 -0.0166012)
      PathPoint L_iliacus_via2: L_femur (0.00376398 -0.0234063 -0.0254853)
      PathPoint L_iliacus_insertion: L_femur (0.00126776 -0.0325453 -0.0342175)
    Thelen2003Muscle L_Rec_fem:
      PathPoint L_rect_fem_origin: Pelvis (2.15162e-5 -0.00623681 -0.0256286)
      PathPoint L_rect_fem_insertion: L_Lowerleg (0.021174 -0.0302471 -0.0935042)
    Thelen2003Muscle L_psoas:
      PathPoint L_psoas_origin: Pelvis (-0.014174 0.0194579 -0.00868099)
      PathPoint L_psoas_via1: Pelvis (0.00386311 -0.0111974 -0.0157405)
      PathPoint L_psoas_via2: L_femur (0.00376398 -0.0234063 -0.0254853)
      PathPoint L_psoas_insertion: L_femur (0.00126776 -0.0325453 -0.0342175)
    Thelen2003Muscle L_Bic_Fem_lg:
      PathPoint L_BIC_fem_lg_origin: Pelvis (-0.00890431 -0.0308302 -0.0128993)
      PathPoint L_BIC_fem_via1: L_Lowerleg (0.0217777 -0.056426 -0.0887038)
      PathPoint L_BIC_fem_insertion: L_Lowerleg (0.0170774 -0.0585951 -0.0874138)
    Thelen2003Muscle L_Bic_Fem_sh:
      PathPoint L_BIC_fem_sh_origin: L_femur (0.00896447 -0.0344651 -0.0617305)
      PathPoint L_BIC_fem_via1: L_Lowerleg (0.0217777 -0.056426 -0.0887038)
      PathPoint L_BIC_fem_insertion: L_Lowerleg (0.0170774 -0.0585951 -0.0874138)
    Thelen2003Muscle L_vas_int:
      PathPoint L_vast_int_origin: L_femur (0.00345114 -0.0278366 -0.0568241)
      PathPoint L_vast_int_insertion: L_Lowerleg (0.0210611 -0.0292366 -0.0935335)
    Thelen2003Muscle L_Med_gastroc:
      PathPoint L_med_gas_origin: L_femur (0.0268053 -0.0385259 -0.0854785)
      PathPoint L_med_gas_insertion: L_Lowerleg (-9.5045e-5 -0.0746847 -0.0166864)
    Thelen2003Muscle L_obl_ext:
      PathPoint L_obl_ext_origin: Thorax (-0.0107142 0.0539619 -0.0471901)
      PathPoint L_obl_ext_insertion: Pelvis (0.00637047 -0.0199486 -0.00243384)
    Thelen2003Muscle L_obl_int:
      PathPoint L_obl_int_origin: Pelvis (-0.00670537 0.0112305 -0.0283133)
      PathPoint obl_int_insertion: Thorax (0.022633 0.0696427 0.000758689)
    Thelen2003Muscle L_Rect_abd:
      PathPoint L_rect_abd_origin: Thorax (0.0164862 0.0916613 -0.0341377)
      PathPoint L_rect_abd_via1: Pelvis (0.00473064 -0.000742157 -0.0153633)
      PathPoint L_rect_abd_insertion: Pelvis (0.00732889 -0.0199108 -0.00221093)
    Thelen2003Muscle L_Sterno_mast:
      PathPoint L_SCM_origin: Head (-0.017085 0.186398 -0.0495605)
      PathPoint L_sterno_mastoid_insertion: L_clavicle (0.00315949 0.141643 -0.0149407)
    Thelen2003Muscle L_Cleido_mast:
      PathPoint L_SCM_origin: Head (-0.017085 0.186398 -0.0495605)
      PathPoint L_cleido_mastoid_insertion: L_clavicle (0.00115255 0.143911 -0.0233339)
    Thelen2003Muscle L_Cleido_occ:
      PathPoint L_cleido_occ_origin: Head (-0.0307126 0.19336 -0.0480693)
      PathPoint L_cleido_occ_insertion: L_clavicle (0.00115228 0.143913 -0.023324)
    Thelen2003Muscle L_SCA_ant:
      PathPoint L_SCAant_origin: C4 (-0.0171862 0.167862 -0.0226229)
      PathPoint L_SCAant_insertion: Thorax (-0.00560015 0.139127 -0.0262877)
    Thelen2003Muscle L_SCA_med:
      PathPoint L_SCAmed_origin: C3 (-0.0183711 0.172594 -0.0268242)
      PathPoint L_SCAmed_insertion: Thorax (-0.0126542 0.140579 -0.0271378)
    Thelen2003Muscle L_SCA_post:
      PathPoint L_SCApost_origin: C5 (-0.0212734 0.164132 -0.0246568)
      PathPoint L_SCApost_insertion: Thorax (-0.00521993 0.12777 -0.0322717)
    Thelen2003Muscle L_Splen_cap:
      PathPoint L_splen_cap_sklT1_origin: Head (-0.0289853 0.190422 -0.0448126)
      PathPoint splen_cap_sklT1_insertion: Thorax (-0.0330421 0.146309 -0.00950632)
    Thelen2003Muscle L_Trap_Cl:
      PathPoint TRAP_CL_origin: Head (-0.0539892 0.221099 -0.0226004)
      PathPoint L_TRAP_CL_insertion: L_clavicle (-0.0119805 0.151572 -0.0357816)
    Thelen2003Muscle L_Trap_Acr:
      PathPoint TRAP_ACR_origin: Thorax (-0.0330202 0.152822 -0.0106086)
      PathPoint L_TRAP_ACL_insertion: L_scapula (-0.0211071 0.14434 -0.0443673)
    Thelen2003Muscle L_Splen_cerv:
      PathPoint L_splen_cerv_origin: C3 (-0.0247486 0.171189 -0.0254795)
      PathPoint splen_cerv_insertion: Thorax (-0.0355722 0.132272 -0.00845568)
    Thelen2003Muscle L_Semi_cap:
      PathPoint L_semi_cap_origin: Thorax (-0.0238827 0.150896 -0.0221988)
      PathPoint L_semi_cap_insertion: Head (-0.0486473 0.209249 -0.0249998)
    Thelen2003Muscle L_Semi_cerv:
      PathPoint L_semi_cerv_origin: Thorax (-0.0277223 0.144593 -0.0205948)
      PathPoint semi_cerv_insertion: C3 (-0.0306408 0.174377 -0.0136006)
    Thelen2003Muscle L_Lev_scap:
      PathPoint L_Levator_scap_origin: C1 (-0.0220766 0.181245 -0.0343259)
      PathPoint L_Levator_scap_insertion: L_scapula (-0.0317691 0.144697 -0.0298701)
    Thelen2003Muscle L_QL_costo_iliac:
      PathPoint L_QL_costo_iliac_origin: Thorax (-0.0255961 0.0575769 -0.0176445)
      PathPoint L_QL_costo_iliac_insertion: Pelvis (-0.0166893 0.0140056 -0.0210963)
    Thelen2003Muscle L_QL_costo_trans_L1:
      PathPoint L_QL_costo_trans_origin: Thorax (-0.0252017 0.0580243 -0.0158591)
      PathPoint L_QL_costo_trans_L1_insertion: Lumbar (-0.0254064 0.0443829 -0.0142667)
    Thelen2003Muscle L_QL_costo_trans_L5:
      PathPoint L_QL_costo_trans_origin: Thorax (-0.0252017 0.0580243 -0.0158591)
      PathPoint L_QL_costo_trans_L5_insertion: Lumbar (-0.0179897 0.0156265 -0.0115116)
    Thelen2003Muscle L_QL_ilio_trans_L1:
      PathPoint L_QL_ilio_trans_L1_origin: Lumbar (-0.0254064 0.0443829 -0.0142667)
      PathPoint L_QL_costo_iliac_insertion: Pelvis (-0.0166893 0.0140056 -0.0210963)
    Thelen2003Muscle L_QL_ilio_trans_L5:
      PathPoint L_QL_ilio_trans_L5_origin: Lumbar (-0.0179897 0.0156265 -0.0115116)
      PathPoint L_QL_costo_iliac_insertion: Pelvis (-0.0166893 0.0140056 -0.0210963)
    Thelen2003Muscle L_LD_T7:
      PathPoint L_LD_T7_origin: Thorax (-0.0358858 0.100576 -0.00583687)
      PathPoint L_LD_T7_via1: Thorax (-0.0301202 0.0963496 -0.0353304)
      PathPoint L_LD_insertion: L_humerus (-0.0149064 0.129613 -0.0582122)
    Thelen2003Muscle L_LD_T8:
      PathPoint L_LD_T8_origin: Thorax (-0.0355938 0.0923041 -0.00502509)
      PathPoint L_LD_T8_via1: Thorax (-0.0313623 0.090051 -0.0340805)
      PathPoint L_LD_insertion: L_humerus (-0.0149064 0.129613 -0.0582122)
    Thelen2003Muscle L_LD_T9:
      PathPoint L_LD_T9_origin: Thorax (-0.0348001 0.0844273 -0.00414615)
      PathPoint L_LD_T9_via1: Thorax (-0.0323282 0.0836344 -0.0322397)
      PathPoint L_LD_insertion: L_humerus (-0.0149064 0.129613 -0.0582122)
    Thelen2003Muscle L_LD_T10:
      PathPoint L_LD_T10_origin: Thorax (-0.0347251 0.0765313 -0.0035267)
      PathPoint L_LD_T10_via1: Thorax (-0.0325771 0.0776232 -0.0307519)
      PathPoint L_LD_insertion: L_humerus (-0.0149064 0.129613 -0.0582122)
    Thelen2003Muscle L_LD_T11:
      PathPoint L_LD_T11_origin: Thorax (-0.0344534 0.0671112 -0.00297247)
      PathPoint L_LD_T11_via1: Thorax (-0.0331939 0.0720419 -0.0307018)
      PathPoint L_LD_insertion: L_humerus (-0.0149064 0.129613 -0.0582122)
    Thelen2003Muscle L_LD_T12:
      PathPoint L_LD_T12_origin: Thorax (-0.0336526 0.0579842 -0.0021028)
      PathPoint L_LD_T12_via1: Thorax (-0.0335776 0.0683318 -0.0316162)
      PathPoint L_LD_insertion: L_humerus (-0.0149064 0.129613 -0.0582122)
    Thelen2003Muscle L_LD_L1:
      PathPoint L_LD_L1_origin: Lumbar (-0.032388 0.0479391 -0.00430128)
      PathPoint L_LD_L_via1: Thorax (-0.0316592 0.0648284 -0.0358339)
      PathPoint L_LD_insertion: L_humerus (-0.0149064 0.129613 -0.0582122)
    Thelen2003Muscle L_LD_L2:
      PathPoint L_LD_L2_origin: Lumbar (-0.0299556 0.0379744 -0.0032646)
      PathPoint L_LD_L_via1: Thorax (-0.0316592 0.0648284 -0.0358339)
      PathPoint L_LD_insertion: L_humerus (-0.0149064 0.129613 -0.0582122)
    Thelen2003Muscle L_LD_L3:
      PathPoint L_LD_L3_origin: Lumbar (-0.0277061 0.0282761 -0.00263579)
      PathPoint L_LD_L_via1: Thorax (-0.0316592 0.0648284 -0.0358339)
      PathPoint L_LD_insertion: L_humerus (-0.0149064 0.129613 -0.0582122)
    Thelen2003Muscle L_LD_L4:
      PathPoint L_LD_L4_origin: Lumbar (-0.0265791 0.0199381 -0.0021454)
      PathPoint L_LD_L_via1: Thorax (-0.0316592 0.0648284 -0.0358339)
      PathPoint L_LD_insertion: L_humerus (-0.0149064 0.129613 -0.0582122)
    Thelen2003Muscle L_LD_L5:
      PathPoint L_LD_L5_origin: Lumbar (-0.0246481 0.0129719 -0.0015806)
      PathPoint L_LD_L_via1: Thorax (-0.0316592 0.0648284 -0.0358339)
      PathPoint L_LD_insertion: L_humerus (-0.0149064 0.129613 -0.0582122)
    Thelen2003Muscle L_LD_iliac:
      PathPoint L_LD_iliac_origin: Pelvis (-0.0198132 0.0104414 -0.0146763)
      PathPoint L_LD_L_via1: Thorax (-0.0316592 0.0648284 -0.0358339)
      PathPoint L_LD_insertion: L_humerus (-0.0149064 0.129613 -0.0582122)
    Thelen2003Muscle L_BIC_long:
      PathPoint L_BIClong_orig: L_scapula (-0.018668 0.139643 -0.0458992)
      PathPoint L_BIClong_via_2: L_humerus (-0.0100484 0.133982 -0.053086)
      PathPoint L_BIClong_via_3: L_humerus (-0.00753011 0.13255 -0.0554667)
      PathPoint L_BIClong_via_4: L_humerus (-0.0049756 0.127703 -0.056165)
      PathPoint L_BIClong_via_5: L_humerus (-0.00756933 0.122727 -0.0557013)
      PathPoint L_BIClong_via_6: L_humerus (-0.0119326 0.113414 -0.0575846)
      PathPoint L_BIClong_via_7: L_humerus (-0.0164418 0.0961221 -0.0598028)
      PathPoint L_BICall_ins: L_Forearm (-0.0171944 0.0594526 -0.0666906)
    Thelen2003Muscle L_BIC_short:
      PathPoint L_BICshort_orig: L_scapula (-0.0143311 0.140058 -0.0447999)
      PathPoint L_BICshort_via_1: L_humerus (-0.0125538 0.123061 -0.0505082)
      PathPoint L_BICshort_via_2: L_humerus (-0.0137441 0.114149 -0.0553859)
      PathPoint L_BICshort_via_3: L_humerus (-0.0164408 0.0961123 -0.0598013)
      PathPoint L_BICall_ins: L_Forearm (-0.0171944 0.0594526 -0.0666906)
    Thelen2003Muscle L_BRA:
      PathPoint L_BRA_orig: L_humerus (-0.0172183 0.0965868 -0.0601851)
      PathPoint L_BRA_via_1: L_humerus (-0.0229568 0.0734599 -0.0619386)
      PathPoint L_BRA_ins: L_Forearm (-0.0243134 0.0576689 -0.0632281)
    Thelen2003Muscle L_DELT1:
      PathPoint L_DELT1_origin: L_clavicle (-0.00965157 0.149526 -0.0364906)
      PathPoint L_DELT1_via_1: L_humerus (-0.00205394 0.138221 -0.0493108)
      PathPoint L_DELT1_insertion: L_humerus (-0.0126174 0.109082 -0.0607012)
    Thelen2003Muscle L_DELT2:
      PathPoint L_DELT2_origin: L_scapula (-0.0154064 0.146192 -0.0515382)
      PathPoint L_DELT2_via_1: L_humerus (-0.00313086 0.132506 -0.0572204)
      PathPoint L_DELT2_via_2: L_humerus (-0.00850041 0.113375 -0.0600225)
      PathPoint L_DELT2_insertion: L_humerus (-0.0139447 0.106397 -0.0612553)
    Thelen2003Muscle L_DELT3:
      PathPoint L_DELT3_origin: L_scapula (-0.0231777 0.145413 -0.0451165)
      PathPoint L_DELT3_via_1: L_humerus (-0.0080949 0.130297 -0.0642824)
      PathPoint L_DELT3_insertion: L_humerus (-0.00971286 0.11575 -0.0596341)
    Thelen2003Muscle L_PEC1:
      PathPoint L_PEC1_origin: L_clavicle (-0.00199501 0.144444 -0.0284214)
      PathPoint L_PEC1_via_1: L_clavicle (-0.00418696 0.132375 -0.0440065)
      PathPoint L_PEC1_via_2: L_humerus (-0.00754025 0.121954 -0.0557291)
      PathPoint L_PEC_insertion: L_humerus (-0.00710011 0.121371 -0.0588469)
    Thelen2003Muscle L_PEC2:
      PathPoint L_PEC2_origin: Thorax (0.0215225 0.116385 -0.00526941)
      PathPoint L_PEC2_via_1: Thorax (0.0167363 0.115583 -0.0187698)
      PathPoint L_PEC2_via_2: Thorax (0.00962784 0.11697 -0.0381128)
      PathPoint L_PEC2_via_3: Thorax (-0.0100997 0.11967 -0.0550815)
      PathPoint L_PEC_insertion: L_humerus (-0.00710011 0.121371 -0.0588469)
    Thelen2003Muscle L_SUPSP:
      PathPoint L_SUPSP_origin: L_scapula (-0.0259879 0.143573 -0.0360584)
      PathPoint L_SUPSP_via_1: L_scapula (-0.0171082 0.1476 -0.0499404)
      PathPoint L_SUPSP_insertion: L_humerus (-0.00594618 0.130062 -0.0597308)
    Thelen2003Muscle L_INFSP:
      PathPoint L_INFSP_origin: L_scapula (-0.0251832 0.129042 -0.042831)
      PathPoint L_INFSP_via_1: L_scapula (-0.0131895 0.129746 -0.0615511)
      PathPoint L_INFSP_insertion: L_humerus (-0.00731201 0.129623 -0.061079)
    Thelen2003Muscle L_SUBSC:
      PathPoint L_SUBSC_origin: L_scapula (-0.0272097 0.134741 -0.0374407)
      PathPoint L_SUBSC_via_1: L_humerus (-0.0132733 0.127695 -0.0444817)
      PathPoint L_SUBSC_insertion: L_humerus (-0.00864119 0.129841 -0.0505926)
    Thelen2003Muscle L_Tmin:
      PathPoint L_TMIN_origin: L_scapula (-0.0281996 0.122914 -0.0417659)
      PathPoint L_TMIN_via_1: L_humerus (-0.0132145 0.124461 -0.0614068)
      PathPoint L_TMIN_insertion: L_humerus (-0.0086042 0.125156 -0.0611394)
    Thelen2003Muscle L_Tmaj:
      PathPoint L_TMAJ_origin: L_scapula (-0.0291615 0.11793 -0.041499)
      PathPoint L_TMAJ_via_1: L_scapula (-0.0268306 0.117321 -0.0420438)
      PathPoint L_TMAJ_insertion: L_humerus (-0.0107963 0.117618 -0.0557714)
    Thelen2003Muscle L_CORB:
      PathPoint L_CORB_origin: L_scapula (-0.0148474 0.140964 -0.0422571)
      PathPoint L_CORB_via_1: L_scapula (-0.0110833 0.132135 -0.0444535)
      PathPoint L_CORB_insertion: L_humerus (-0.0166701 0.099998 -0.0587272)
